/POST1
NSEL,S,LOC,X,A
NSEL,R,LOC,Y,0
*GET,NA,NODE,0,NUM,MIN
NSEL,S,LOC,X,A
NSEL,R,LOC,Y,B
*GET,NB,NODE,0,NUM,MIN
ALLSEL
*DO,III,1,5
SET,III
/OUTPUT,ADISP,OUT,,APPEND
*VWRITE,UX(NA),UY(NA),UZ(NA)
(E16.8,5X,E16.8,5X,E16.8,5X)
/OUTPUT
/OUTPUT,BDISP,OUT,,APPEND
*VWRITE,UX(NB),UY(NB),UZ(NB)
(E16.8,5X,E16.8,5X,E16.8,5X)
/OUTPUT
*ENDDO
