/RGB,INDEX,100,100,100,0
/RGB,INDEX,0,0,0,15

/POST1
PLDISP,1
/IMAGE,SAVE,displaced_struct,png
PLNSOL,S,X,0,1.0
/IMAGE,SAVE,sig_x,png

PLNSOL,S,Y,0,1.0
/IMAGE,SAVE,sig_y,png

PLNSOL,S,XY,0,1.0
/IMAGE,SAVE,sig_xy,png

PLNSOL,U,X,0,1.0
/IMAGE,SAVE,u_x,png

PLNSOL,U,Y,0,1.0
/IMAGE,SAVE,u_y,png
