/RGB,INDEX,100,100,100,0
/RGB,INDEX,0,0,0,15

L = 0.8
h = 110e-3
b = 60e-3
t = 10e-3

EE = 210e9
NU = 0.3

rho = 7800
g = 9.81
p = 1e6

/PREP7

/VIEW,1,1,1,1
/ANG,1

K,1,0,0,0
K,2,b/2,0,0
K,3,b,0,0
K,4,b,h,0
K,5,b/2,h,0
K,6,0,h,0
K,7,b/2,h,L
K,8,b/2,0,L

L,1,2
L,2,3
L,2,5
L,6,5
L,5,4
L,5,7
L,2,8

ADRAG,1,2,,,,,7
ADRAG,3, ,,,,,7
ADRAG,4,5,,,,,6
